# Аппроксимация методом наименьших квадратов
# Опорная функция:
FX(x) := x^2*(x + sin(2*x))/(x^2 + 0.5)
a := 0
b := 5
# Количество точек:
m := 255
h := (b - a)/m
p := π/(2*(m + 1))
s := (a + b)/2
d := (b - a)/2
ii := 0 .. m
xi[ii] := a + ii*h
yi[ii] := (FX(xi[ii]) + rnd(1) - 0.5)
n := 15
nn := m + 1
z := regress(xi, yi, n)  # - коэффициенты полинома
ff(x) := interp(z, xi, yi, x)
j := 0 .. m
tx[j] := min(xi) + j*(max(xi) - min(xi))/(m + 1)
fff[j] := ff(tx[j])  # - вычисление значений полинома
i := 0 .. m
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# Результаты расчетов:
j := 0 .. m
DD[j] := |yi[j] - fff[j]|
DDD := sum((yi[kk] - fff[kk])^2, kk = 0 .. m)
DDD := DDD/(m - n)
DDD = 0.081301  # - остаточная дисперсия
scp := mean(DD)
scp = 0.23665  # - средняя ошибка
smax := max(DD)
smax = 0.655395  # - максимальная ошибка
jj := 0 .. m
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# График ошибок:
ff(x, n) := interp(regress(xi, yi, n), xi, yi, x)
tx[j] := min(xi) + j*(max(xi) - min(xi))/(m + 1)
fff(j, n) := ff(tx[j], n)
DDD(n) := sum((yi[kk] - fff(kk, n))^2/(m - n), kk = 0 .. m)
nn := 3 .. 25
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# Таблица для дисперсий
# (определяем минимальную степень полинома)
DDD(1) = 0.388861
DDD(19) = 0.0819644
DDD(10) = 0.0825066
DDD(2) = 0.358926
DDD(20) = 0.0821196
DDD(11) = 0.0828422
DDD(3) = 0.326513
DDD(12) = 0.0825876
DDD(21) = 0.0822526
DDD(4) = 0.116608
DDD(13) = 0.0824781
DDD(22) = 0.0826267
DDD(5) = 0.116734
DDD(14) = 0.0825594
DDD(23) = 0.0843953
DDD(6) = 0.0827118
DDD(15) = 0.081301
DDD(24) = 0.0991796
DDD(7) = 0.0824542
DDD(16) = 0.0813409
DDD(25) = 0.162269
DDD(8) = 0.0825216
DDD(17) = 0.0816897
DDD(9) = 0.0822613
DDD(18) = 0.0816599
